*Heading
** Job name: slide Model name: Model-1
** Generated by: Abaqus/CAE 2023
*Preprint, echo=NO, model=NO, history=NO, contact=NO
**
** PARTS
**
*Part, name=Part-2
*Node
      1,   50.9102859,          35.,           0.
      2,   50.7282257,          35.,           0.
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*Element, type=C3D8R
   1,  490,  700,    5,  428, 2020, 2230, 1535, 1958
   2,  751, 1422, 1368, 1174, 2281, 2952, 2898, 2704
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*Nset, nset=slide, generate
    1,  3060,     1
*Elset, elset=slide, generate
    1,  1409,     1
** Section: soil
*Solid Section, elset=slide, material=Material-1
,
*End Part
**
*Part, name=Part-3
*Node
      1,   14.3960171,    5.3519516,           0.
      2,   18.6800404,   6.39883947,           0.
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*Element, type=C3D8R
 1,  87,  28,  29,  61, 209, 150, 151, 183
 2,  31,  66,  65,  30, 153, 188, 187, 152
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*Nset, nset=base, generate
   1,  244,    1
*Elset, elset=base, generate
  1,  96,   1
** Section: soil
*Solid Section, elset=base, material=Material-1
,
*End Part
**
**
** ASSEMBLY
**
*Assembly, name=Assembly
**
*Instance, name=Part-2-1, part=Part-2
        -20.,         -20.,           0.
*End Instance
**
*Instance, name=Part-3-1, part=Part-3
*End Instance
**
*Node
      1,           0.,           0.,           1.
*Nset, nset=rp1
 1,
*Nset, nset=_PickedSet15, internal
 1,
** Constraint: Constraint-1
*Rigid Body, ref node=_PickedSet15, elset=Part-3-1.base
*End Assembly
*Amplitude, name=Amp-1
             0.,              0.,              1.,              1.
**
** MATERIALS
**
*Material, name=Material-1
*Density
2000.,
*Elastic
 1e+07, 0.25
**
** INTERACTION PROPERTIES
**
*Surface Interaction, name=IntProp-1
*Friction
 0.2,
*Surface Behavior, pressure-overclosure=HARD
**
** BOUNDARY CONDITIONS
**
** Name: BC-1 Type: Symmetry/Antisymmetry/Encastre
*Boundary
rp1, ENCASTRE
**
** INTERACTIONS
**
** Interaction: Int-1
*Contact, op=NEW
*Contact Inclusions, ALL EXTERIOR
*Contact Property Assignment
 ,  , IntProp-1
** ----------------------------------------------------------------
**
** STEP: Step-1
**
*Step, name=Step-1, nlgeom=YES
*Dynamic, Explicit
, 20.
*Bulk Viscosity
0.06, 1.2
**
** LOADS
**
** Name: Load-1   Type: Gravity
*Dload, amplitude=Amp-1
, GRAV, 9.8, 0., -1., 0.
**
** OUTPUT REQUESTS
**
*Restart, write, number interval=1, time marks=NO
**
** FIELD OUTPUT: F-Output-1
**
*Output, field, variable=PRESELECT
**
** HISTORY OUTPUT: H-Output-1
**
*Output, history, variable=PRESELECT
*End Step
